from stlib.scene import MainHeader, ContactHeader
from stlib.visuals import ShowGrid
from stlib.physics.rigid import Floor
from stlib.physics.rigid import Cube

def createScene(rootNode):

    MainHeader(rootNode, gravity=[0.0,-981.0,0.0])
    ContactHeader(rootNode, alarmDistance=8, contactDistance=5)

    ShowGrid(rootNode)

    Floor(rootNode,
            translation=[0.0,-160.0,0.0],
            uniformScale=5.0,
            isAStaticObject=True)

    Floor(rootNode,
            name="FloorObstacle",
            translation=[0.0,-80.0,0.0],
            color=[0.0,1.0,0.0],
            uniformScale=0.8,
            isAStaticObject=True)


    Cube(rootNode,
                name="Cube"+str(-210),
                translation=[-210,0.0,0.0],
                color=[10.0,0.7/10.0,0.9],
                uniformScale=20.0)

    return rootNode
