import Sofa

import os

def createScene(rootNode):

        rootNode.createObject('VisualStyle', displayFlags='showForceFields')
        rootNode.createObject('RequiredPlugin', name='soft', pluginName='SoftRobots')
        #rootNode.findData("bbox").value = "-100 -100 -100 100 100 100"
        rootNode.findData('gravity').value='-9810 0 0';

        actuator = rootNode.createChild('actuator')
        actuator.createObject('MeshVTKLoader', name='loader', filename='data/mesh/actuator.vtk')
        actuator.createObject('Mesh', src='@loader', name='container')
        actuator.createObject('MechanicalObject', name='tetras', template='Vec3d', showObject='true', showObjectScale='1')
        actuator.createObject('TetrahedronFEMForceField', template='Vec3d', name='FEM', method='large', poissonRatio='0.3',  youngModulus='500', drawAsEdges="true")
        actuator.createObject('UniformMass', totalMass='0.0008')
