import Sofa
import math
import os

youngModulusFingers = 500
youngModulusStiffLayerFingers = 1500

radius = 70
angle1 = 0*math.pi/180  # Angle between 1st and 2nd finger in radian
#angle2 = 240*math.pi/180  # Angle between 1st and 3rd finger in radian

# red, green, blue
translateFingerX = [25, 25]
translateFingerY = [-150, -150]
translateFingerZ = [-40, 40]
translateFinger1 = str(translateFingerX[0]) + " " + str(translateFingerY[0]) + " " + str(translateFingerZ[0])


translateFinger2 = str(translateFingerX[1]) + " " + str(translateFingerY[1]) + " " + str(translateFingerZ[1])

#translateFinger3 = "0 " + str(radius + radius*math.sin(angle2-math.pi/2)) + " " + str(radius*math.cos(angle2-math.pi/2))
translations= [translateFinger1,translateFinger2]
angles=[0,angle1]

def createScene(rootNode):

				rootNode.createObject('RequiredPlugin', pluginName='SoftRobots')
				rootNode.createObject('RequiredPlugin', name='SofaPython', pluginName='SofaPython')
				rootNode.createObject('VisualStyle', displayFlags='showVisualModels hideBehaviorModels hideCollisionModels hideBoundingCollisionModels hideForceFields showInteractionForceFields hideWireframe')
				rootNode.findData('gravity').value='-9810 0 0';
				rootNode.createObject('FreeMotionAnimationLoop')
				rootNode.createObject('GenericConstraintSolver', tolerance="1e-12", maxIterations="10000")
				rootNode.createObject('CollisionPipeline', verbose="0")
				rootNode.createObject('BruteForceDetection', name="N2")
				rootNode.createObject('CollisionResponse', response="FrictionContact", responseParams="mu=0.6")
				rootNode.createObject('LocalMinDistance', name="Proximity", alarmDistance="5", contactDistance="1", angleCone="0.00")

				rootNode.createObject('BackgroundSetting', color='0 0.168627 0.211765')
				rootNode.createObject('OglSceneFrame', style="Arrows", alignment="TopRight")
				rootNode.createObject('PythonScriptController', filename="pythonControllers/wholeGripperController.py", classname="controller")

				planeNode = rootNode.createChild('Plane')
				planeNode.createObject('MeshObjLoader', name='loader', filename="data/mesh/floorFlat.obj", triangulate="true", rotation="0 0 270", scale=10, translation="0 0 0")
				planeNode.createObject('Mesh', src="@loader")
				planeNode.createObject('MechanicalObject', src="@loader")
				planeNode.createObject('Triangle', simulated="0", moving="0")
				planeNode.createObject('Line', simulated="0", moving="0")
				planeNode.createObject('Point', simulated="0", moving="0")
				planeNode.createObject('OglModel',name="Visual", src="@loader", color="1 0 0 1")

				cube = rootNode.createChild('cube')
				cube.createObject('EulerImplicit', name='odesolver')
				cube.createObject('SparseLDLSolver', name='linearSolver')
				cube.createObject('MechanicalObject', template="Rigid3d", position='25 -80 0 0 0 0 0')
				cube.createObject('UniformMass', totalMass='0.001')
				cube.createObject('UncoupledConstraintCorrection')

				#collision
				cubeCollis = cube.createChild('cubeCollis')
				cubeCollis.createObject('MeshObjLoader', name="loader", filename="data/mesh/smCube27.obj", triangulate="true",  scale="6")
				cubeCollis.createObject('Mesh', src="@loader")
				cubeCollis.createObject('MechanicalObject')
				cubeCollis.createObject('Triangle')
				cubeCollis.createObject('Line')
				cubeCollis.createObject('Point')
				cubeCollis.createObject('RigidMapping')

				#visualization
				cubeVisu = cube.createChild('cubeVisu')
				cubeVisu.createObject('MeshObjLoader', name="loader", filename="data/mesh/smCube27.obj")
				cubeVisu.createObject('OglModel', name="Visual", src="@loader", color="0.0 0.1 0.5", scale="6.2")
				cubeVisu.createObject('RigidMapping')

				#connector = rootNode.createChild('Connector')
				#connector.createObject('MeshVTKLoader', name='loader', filename="data/mesh/connector.vtk", rotation="0 90 90", translation="26 -150 0")
				#connector.createObject('Mesh', src="@loader")
				#connector.createObject('MechanicalObject', src="@loader")
				#connector.createObject('Triangle', simulated="0", moving="0")
				#connector.createObject('Line', simulated="0", moving="0")
				#connector.createObject('Point', simulated="0", moving="0")
				#connector.createObject('OglModel',name="Visual", src="@loader")


				for i in range(2):
					##########################################
					# Actuator Model	 					 #
					##########################################
					actuator = rootNode.createChild('actuator'+str(i+1))
					actuator.createObject('EulerImplicit', name='odesolver', rayleighStiffness='0.1', rayleighMass='0.1')
					actuator.createObject('SparseLDLSolver', name='preconditioner')

					#actuator.createObject('MeshVTKLoader', name='loader', filename='data/mesh/actuator.vtk',rotation=str(360 - angles[i]*180/math.pi)+ " 0 0", translation = translations[i])
					actuator.createObject('MeshVTKLoader', name='loader', filename='data/mesh/actuator.vtk',rotation="0 0 0", translation = translations[i])
					actuator.createObject('TetrahedronSetTopologyContainer', src='@loader', name='container')
					actuator.createObject('TetrahedronSetTopologyModifier')
					actuator.createObject('TetrahedronSetTopologyAlgorithms', template='Vec3d')
					actuator.createObject('TetrahedronSetGeometryAlgorithms', template='Vec3d')

					actuator.createObject('MechanicalObject', name='tetras', template='Vec3d', showIndices='false', showIndicesScale='4e-5', rx='0', dz='0')
					actuator.createObject('UniformMass', totalMass= 0.04)
					actuator.createObject('TetrahedronFEMForceField', template='Vec3d', name='FEM', method='large', poissonRatio=0.3,  youngModulus=youngModulusFingers, drawAsEdges="1")

					# Bounding Box
					#actuator.createObject('BoxROI', name='boxROI', box='-22.5 20 -22.5 22.5 25 22.5', drawBoxes='true', drawSize='1', doUpdate='0')
					actuator.createObject('BoxROI', name='boxROI', box=str(translateFingerX[i] - 22.5) + " " + str(translateFingerY[i] - 25) + " " + str(translateFingerZ[i] - 22.5) + " " + str(translateFingerX[i] + 22.5) + " " + str(translateFingerY[i] - 20) + " " + str(translateFingerZ[i] + 22.5) + " ", drawBoxes='false', drawSize='1', doUpdate='0')

					# Stiff layer
					actuator.createObject('BoxROI', name='boxROISubTopo', box=str(translateFingerX[i] - 22.5) + " " + str(translateFingerY[i] - 25) + " " + str(translateFingerZ[i] - 22.5) + " " + str(translateFingerX[i] + 22.5) + " " + str(translateFingerY[i] - 20) + " " + str(translateFingerZ[i] + 22.5) + " ", drawBoxes='false', drawSize='1')
					actuator.createObject('BoxROI', name='boxROISubTopo2', box=str(translateFingerX[i] - 22.5) + " " + str(translateFingerY[i] + 25) + " " + str(translateFingerZ[i] - 22.5) + " " + str(translateFingerX[i] + 22.5) + " " + str(translateFingerY[i] + 20) + " " + str(translateFingerZ[i] + 22.5) + " ", drawBoxes='true', drawSize='1')
					actuator.createObject('RestShapeSpringsForceField', points='@boxROI.indices', stiffness='1e12', angularStiffness='1e12')
					actuator.createObject('LinearSolverConstraintCorrection', solverName='preconditioner')

					##########################################
					# Sub topology						   #
					##########################################
					modelSubTopo = actuator.createChild('modelSubTopo')
					modelSubTopo2 = actuator.createChild('modelSubTopo2')
					modelSubTopo.createObject('TetrahedronSetTopologyContainer', position='@loader.position', tetrahedra="@boxROISubTopo.tetrahedraInROI", name='container')
					modelSubTopo2.createObject('TetrahedronSetTopologyContainer', position='@loader.position', tetrahedra="@boxROISubTopo2.tetrahedraInROI", name='container')
					modelSubTopo.createObject('TetrahedronFEMForceField', template='Vec3d', name='FEM', method='large', poissonRatio='0.3',  youngModulus=str(youngModulusStiffLayerFingers-youngModulusFingers))
					modelSubTopo2.createObject('TetrahedronFEMForceField', template='Vec3d', name='FEM', method='large', poissonRatio='0.3',  youngModulus=str(youngModulusStiffLayerFingers-youngModulusFingers))

					##########################################
					# Constraint							 #
					##########################################
					cavity = actuator.createChild('cavity')
					#cavity.createObject('MeshSTLLoader', name='loader', filename='data/mesh/cavity.stl',translation = translations[i],rotation=str(360 - angles[i]*180/math.pi)+ " 0 0")
					cavity.createObject('MeshSTLLoader', name='loader', filename='data/mesh/cavity.stl',translation = translations[i],rotation="0 0 0")
					cavity.createObject('Mesh', src='@loader', name='topo')
					cavity.createObject('MechanicalObject', name='cavity')
					#cavity.createObject('SurfacePressureConstraint', name="SurfacePressureConstraint", template='Vec3d', value="0.0001", triangles='@topo.triangles', visualization='0', showVisuScale='0.0002', valueType="pressure")
					cavity.createObject('SurfacePressureConstraint', name="SurfacePressureConstraint", template='Vec3d', value="0.0001", triangles='@topo.triangles', drawPressure='0', drawScale='0.0002', valueType="pressure")
					cavity.createObject('BarycentricMapping', name='mapping',  mapForces='false', mapMasses='false')

					##########################################
					# Collision							  #
					##########################################

					collisionFinger = actuator.createChild('collisionFinger')
					#collisionFinger.createObject('MeshSTLLoader', name='loader', filename='data/mesh/actuator.stl', translation = translations[i],rotation=str(360 - angles[i]*180/math.pi)+ " 0 0")
					collisionFinger.createObject('MeshSTLLoader', name='loader', filename='data/mesh/actuator.stl', translation = translations[i],rotation="0 0 0")
					collisionFinger.createObject('Mesh', src='@loader', name='topo')
					collisionFinger.createObject('MechanicalObject', name='collisMech')
					collisionFinger.createObject('Triangle', selfCollision="false")
					collisionFinger.createObject('Line',selfCollision="false")
					collisionFinger.createObject('Point', selfCollision="false")
					collisionFinger.createObject('BarycentricMapping')

					##########################################
					# Visualization						  #
					##########################################
					modelVisu = actuator.createChild('visu')
					modelVisu.createObject('MeshSTLLoader', name="loader", filename="data/mesh/actuator.stl")
					#modelVisu.createObject('OglModel', src="@loader", template='ExtVec3d', color='0.7 0.7 0.7 0.6',translation = translations[i],rotation=str(360 - angles[i]*180/math.pi)+ " 0 0")
					modelVisu.createObject('OglModel', src="@loader", template='ExtVec3d', color='0.7 0.7 0.7 0.6',translation = translations[i],rotation="0 0 0")
					modelVisu.createObject('BarycentricMapping')

				return rootNode
